#
# Set log filename
#
log log_initialize_1000K.lammps
#
# Set up general geometry and type of simulation (will use a slab geometry under full periodicity)
#
dimension       3
atom_style      atomic
units           metal
boundary        p p p
#
# Create simulation geometry (cell and slab measured in terms of
# BCC unit cells of side length 3.1651956 - lattice constant of Tungsten)
#
# first define the entire simulation cell region
#
# source: https://www.ctcms.nist.gov/potentials/entry/2012--Ward-D-K-Zhou-X-W-Wong-B-M-et-al--Cd-Te/2012--Ward-D-K--Cd-Te--LAMMPS--ipr1.html
# a0 for CdTe, prototype: B3--ZnC--cubic-zinc-blende
#
# lattice custom 6.828870164 a1 1.0 0.0 0.0 a2 0.0 1.0 0.0 a3 0.0 0.0 1.0 basis 0.0 0.0 0.0 basis 0.5 0.0 0.5 basis 0.5 0.5 0.0 basis 0.0 0.5 0.5 basis 0.75 0.75 0.75 basis 0.25 0.75 0.25 basis 0.25 0.25 0.75 basis 0.75 0.25 0.25
# lattice constant at 1000K via extrapolation: a = 6.8944 ?
# lattice constant at 700K: a =
# lattice constant at 300K: a =
lattice custom 6.894471578 a1 1.0 0.0 0.0 a2 0.0 1.0 0.0 a3 0.0 0.0 1.0 basis 0.0 0.0 0.0 basis 0.5 0.0 0.5 basis 0.5 0.5 0.0 basis 0.0 0.5 0.5 basis 0.75 0.75 0.75 basis 0.25 0.75 0.25 basis 0.25 0.25 0.75 basis 0.75 0.25 0.25
region box block 0 5 0 5 -2 15
create_box 2 box

#
# Now add the slab of atoms
#
region slab block 0 5 0 5 -2 4
create_atoms 2 region slab basis 1 1 basis 2 1  basis 3 1 basis 4 1 basis 5 2 basis 6 2 basis 7 2 basis 8 2

# Define atomic masses of atom (Cd and Te)
#
mass 1 112.411
mass 2 127.6
#
# Save starting configuration
#
write_data initial_lattice_1000K.lammps
#

#
# Define a bottom region of the slab (of thickness 4 Angstroms) in which
# the atomis will be fixed (i.e. will always experience a zero force)
#
variable thickness equal 4.0
variable sxlo equal xlo
variable sxhi equal xhi
variable sylo equal ylo
variable syhi equal yhi
variable szlo equal zlo-0.1
variable szhi equal zlo+${thickness}
region layer block ${sxlo} ${sxhi} ${sylo} ${syhi} ${szlo} ${szhi} units box
group fixedlayer region layer
#
# Set the initial velocities to zero
#
velocity all create 0.0 87287
#
# Write out initial configuration
#
write_data initial_1000K.lammps
# dump 0 all atom 1 dump_initial.atom
#
# Define embedded atom potential for Cadmium Telluride
#
pair_style  bop
pair_coeff  * * CdTe1.bop.table Cd Te
# pair_modify   shift yes
#
# Pair style bop requires setting a communication cutoff of at least 14.70
#
comm_modify cutoff 15.00
#
# Set up neighbour list
#
neighbor        0.3 bin
neigh_modify    delay 0 every 10 check yes
#
# Define outputed variables
#
thermo_style custom step temp etotal press lx ly lz vol
thermo 100
#
# Set the forces within the fixed layer to always be zero
#
fix 1 fixedlayer setforce 0.0 0.0 0.0
#
# Minimize structure to find relaxed zero temperature structure
#
minimize        1.0e-15 1e-15 100000 100000
#
# Write out initial relaxed structure
#
write_data initial_relaxed_1000K.lammps
#
# Set up initial temperature to be 1K within the dynamical region and 0K within the static region
#
velocity all create 1000.0 220368
velocity fixedlayer create 0.0 123456
#
# Equilibriate at 1000K
# 1500K would be way too high!!
#
fix 2 all nvt temp 1000.0 1000.0 0.01
# fix 2 all npt temp 1000.0 1000.0 0.1 iso 0.0 0.0 0.1
#
# Output structure every 100 steps
#
dump eqiul all atom 100 dump_thermalize_1000K.atom
#
# Define time step (1 femto-second)
#
timestep 0.001
#
# Perform the simulation
run 10000
#
# Save state of simulation
#
write_restart state_1000K.restart
